// COMSOL Multiphysics 6.1.0.357 model "task3.mph"
// Outline of the model tree

Parameters
  a = 4.5e-6
  d = 1e-6
  wavelength = 1.55e-6

Coordinate systems
  pml1: PML "Perfectly Matched Layer 1" on domains 1-4, 6-9

Geometry
  geom1 "Geometry 1" (2D, length unit m)
    c1: Circle | pos = {-4*a, -2*a*sqrt(3)}; r = d/2
    arr1: Array | input = c1; size = {9, 5}; fullsize = {9, 5}; displ = {a, sqrt(3)*a}
    c2: Circle | pos = {-3.5*a, -1.5*a*sqrt(3)}; r = d/2
    arr2: Array | input = c2; size = {8, 4}; fullsize = {8, 4}; displ = {a, a*sqrt(3)}
    del1: Delete "Delete Entities 1"
      input = arr1(1,1), arr1(1,2), arr1(1,4), arr1(1,5), arr1(2,1), arr1(2,5), arr1(5,3), arr1(8,1), arr1(8,5), arr1(9,1), arr1(9,2), arr1(9,4), arr1(9,5), arr2(1,1), arr2(1,4), arr2(8,1), arr2(8,4)
    r1: Rectangle | base = center; size = {38e-6, 36e-6}
    r2: Rectangle | base = center; size = {44e-6, 42e-6}
    r3: Rectangle | pos = {-2.2E-5, -2.1E-5}; size = {3e-6, 3e-6}
    arr3: Array | input = r3; size = {2, 2}; fullsize = {2, 2}; displ = {41e-6, 39e-6}
    fin: Finalize "Form Union"

Materials
  mat1: Common "SiO2" on domains 1-9
    RefractiveIndex
      n = 1.45
      ki = 0
  mat2: Common "Air" on domains 10-69
    RefractiveIndex
      n = 1
      ki = 0

Physics
  ewfd: ElectromagneticWavesFrequencyDomain on all domains
    dependent variable E = {Ex, Ey, Ez}
    BackgroundField.ktMax = (2*(sqrt(2*log(10))))/ewfd.w0
    PortOptions.PortFormulation = ConstraintBased
    wee1: WaveEquationElectric (default) | epsilonInf_mat = from_mat; minput_frequency = root.freq
    pec1: PerfectElectricConductor (default)
    init1: init "Initial Values 1" (default)
    sctr1: Scattering "Scattering Boundary Condition 1" on boundaries 1-3, 5, 7, 9, 14, 16, 21-24

Mesh
  mesh1 "Mesh 1" (physics-controlled)

Studies
  std1 "Study 1"
    mode: ModeAnalysis | modeFreq = c_const/wavelength; shift = 1.42; linpsolnum = auto

Solver configurations
  sol1 "Solution 1" (study std1)
    v1: Variables "Dependent Variables 1"
    e1: Eigenvalue "Eigenvalue Solver 1" | shift = 1.42; eigref = 1.42
      d1: Direct "Suggested Direct Solver (ewfd)"

Datasets
  dset1: Solution | solution = sol1

Plots
  pg1: PlotGroup2D "Electric Field (ewfd)" | data = dset1
    surf1: Surface | expr = ewfd.normE
    arws1: ArrowSurface | expr = {ewfd.Ex, ewfd.Ey}; descr = Electric field